###############################################
# General settings
###############################################

log         gran_6.log
atom_style  sphere
dimension   2
units       si

###############################################
# Size, contact parameters
###############################################

variable    kn equal 1e6
variable    damp equal 0.0
variable    coeffFric equal 0.3
variable    kt equal 0.5*${kn}
variable    rad equal 5000

variable    omega equal 0.5*10^(-3)
variable    lambda equal 8.0*10^5

variable    airDensity equal 1.225
variable    waterDensity equal 1017.0
variable    windDragCoefficient equal 0.015
variable    oceanDragCoefficient equal 0.0045

###############################################
# Geometry-related parameters
###############################################

variable    lx equal  500000
variable    ly equal  ${lx}*1.5
variable    ly2 equal ${lx}

###############################################
# Create box
###############################################
boundary    f f p

variable    x0 equal 0
variable    x1 equal ${lx}
variable    y0 equal 0
variable    y1 equal ${ly}
region      boxreg block ${x0} ${x1} ${y0} ${y1} -${rad} ${rad} units box
create_box  1 boxreg

###############################################
# Simulation Initialization Includes
###############################################

include     in.include.atoms.grid
include     in.include.funnel
include     in.include.forcing

###############################################
# Computes and Property/atom variables
###############################################

compute     rad all property/atom radius
variable    area atom PI*c_rad^2
variable    velocity atom sqrt(vx*vx+vy*vy)
compute     stress all stress/atom NULL
variable    stressdet   atom c_stress[1]*c_stress[2]-2*c_stress[4]
variable    axialstress atom c_stress[2]+c_stress[1]
variable    shearstress atom sqrt(abs(v_axialstress^2-4*v_stressdet)) ## This may not be valid!!!!

###############################################
# Fixes and pair styles
###############################################
comm_style  tiled
variable    tcol equal PI/sqrt(2*${kn}/${minmass}-${damp}^2/4.0)
variable    dt equal ${tcol}*0.02
timestep    ${dt}

pair_style	gran/hooke ${kn} ${kt} ${damp} 0 ${coeffFric} 1
pair_coeff  * *

fix 1   all nve/sphere disc
fix	2   all enforce2d
fix	3   all addforce v_totfx v_totfy 0.0
fix	4   all balance 10000 1.1 rcb weight neigh 1.0
fix 5   all ridge   v_axialstress v_shearstress -1000000000000 100000000000 0.6
fix	wx  all wall/gran hooke ${kn} ${kt} ${damp} 0 ${coeffFric} 1 xplane ${x0} ${x1}
fix	wy  all wall/gran hooke ${kn} ${kt} ${damp} 0 ${coeffFric} 1 yplane ${y0} ${y1}

###############################################
# Run settings
###############################################

variable      dumpfreq equal 1
variable      logfreq equal 100

variable      skin equal 0.3*${diam}
neighbor      ${skin} bin

comm_modify	  vel yes cutoff ${diam}

thermo_style	custom step cpu atoms ke lx
thermo_modify	flush yes lost warn
thermo        ${logfreq}

dump 1        all custom ${dumpfreq} ../data/DUMP/gran_6.dump id type mass &
              radius x y z v_velocity v_axialstress v_shearstress

run 300
